#include "libdef.any"

Main =
{

  // Body Model configuration:
  #include "Model/BodyModelConfiguration.any"

  // Using your own Mannequin.any file in the Model folder of your model
  #include "Model\Mannequin.any"

  // Include default human model
  #include "<ANYBODY_PATH_BODY>\HumanModel.any"

  AnyFolder Model =
  {
    // A link to the human model
    AnyFolder &BodyModel = .HumanModel.BodyModel;
    AnyFolder &DefaultMannequinDrivers = .HumanModel.DefaultMannequinDrivers;


    // Environment files are used to include objects surrounding human
    #include "Model\Environment.any"

    AnyFolder ModelEnvironmentConnection =
    {
      //'JointsAndDrivers.any' file can include all kinematic constraints such as joints and drivers
      #include "Model\JointsAndDrivers.any"
      // Additional reactions which are required to run the inverse dynamics analysis
      #include "Model\Reactions.any"
    };

    //Definition de l'articulation GH comme 2 spheres
    AnyFolder GH_2spheres =
    {
      //Definition des parametres des spheres; depuis SSM de Leen
      AnyVar rh = 0.0236;
      AnyVar rg = 0.0316;

      // Define a sphere representing the center of humeral head. The supraspinatus and deltoid muscles
      // will wrap about this sphere.
      Main.HumanModel.BodyModel.Right.ShoulderArm.Seg.Humerus.gh ={
        AnySurfSphere HH_sphere =
        {
          Radius = Main.Model.GH_2spheres.rh;
          AnyDrawParamSurf drw = {
            RGB = {0, 0, 1};
            Opacity = 0.5;
          };
        };

        Main.HumanModel.BodyModel.Right.ShoulderArm.Seg.Scapula.gh = {
          AnyRefNode Glenoid_sphere_center ={
            sRel = {0.00,0.00,0.0}; //a definir depuis le code python
            AnySurfSphere Glenoid_sphere =
            {
              Radius = Main.Model.GH_2spheres.rg;
              AnyDrawParamSurf drw = {
                RGB = {0, 0.6, 0.6};
                Opacity = 0.5;
              };
            };
          };
        };
      };

      // GH joint defined as a length constraint on a pline through both centers
      Main.HumanModel.BodyModel.Right.ShoulderArm.Jnt = {
        AnyKinEqSimpleDriver GHJoint_2spheres = {
          AnyKinPLine pline = {
            AnyRefFrame &ori = Main.HumanModel.BodyModel.Right.ShoulderArm.Seg.Scapula.gh.Glenoid_sphere_center;
            AnyRefFrame &ins = Main.HumanModel.BodyModel.Right.ShoulderArm.Seg.Humerus.gh;
          };
          DriverPos = {Main.Model.GH_2spheres.rg - Main.Model.GH_2spheres.rh};
          DriverVel = {0.0};
        };
      };

      // FDK driver to represent the two possible movements of the humeral head
      AnyKinEqSimpleDriver gh_2spheres = {
        AnyKinLinear lin = {
          AnyRefFrame &ori = Main.HumanModel.BodyModel.Right.ShoulderArm.Seg.Scapula.gh.Glenoid_sphere_center;
          AnyRefFrame &ins = Main.HumanModel.BodyModel.Right.ShoulderArm.Seg.Humerus.gh;
        };
        MeasureOrganizer = {1,2};
        DriverPos = {0,0};
        DriverVel = {0,0};
        CType = {ForceDep, ForceDep};
        Reaction.Type = {Off, Off};
      };

    };

    //     Define springs in the shoulder, simulating the effect of passive elements
    AnyForce ShoulderPE = {
      AnyKinPLine pline =
      {
        AnyRefFrame &ori = Main.HumanModel.BodyModel.Right.ShoulderArm.Seg.Scapula.O_deltoideus_lateral_part_2;
        AnyRefFrame &ins = Main.HumanModel.BodyModel.Right.ShoulderArm.Seg.Humerus.gh;
        AnyDrawPLine drw = {
          RGB = {0,1,0};
        };
      };


      #define ForceF 10
      F = {ForceF};
      //     F = {10.0};
      //     F = {iffun(gtfun (0, pline.Pos[0]), -1000*(pline.Pos[0]), -1000*(pline.Pos[0]))} ; //DGA1033 foonctionne
      //     F = {5.62-1.68*pline.Pos[0]-1.12168*(pline.Pos[0])^2+0.9*(pline.Pos[0])^3-0.01*(pline.Pos[0])^4}; // Lauranne these
      //     F = {-10.75+7.787*pline.Pos[0]-4.391*(pline.Pos[0])^2+0.08637*(pline.Pos[0])^4}; // Lauranne modele Lio
    };

  };

  AnyBodyStudy Study =
  {
    AnyFolder &Model = .Model;

    Gravity={0.0, -9.81, 0.0};
    nStep = 30;
    // Overdeterminate solver is needed while using the
    // soft default mannequin drivers.
    Kinematics.SolverType = KinSolOverDeterminate;
    InitialConditions.SolverType = Kinematics.SolverType ;
    InverseDynamics.ForceDepKinOnOff=On;

    AnyVar JointAngle =  Main.HumanModel.BodyModel.Right.ShoulderArm.InterfaceFolder.GlenohumeralAbduction.Pos[0]*180/pi  ;


    //exclure le GHJoint a 3 DOF
    MechObjectExclude = arrcat(
    ObjSearchRecursive("Main.HumanModel.BodyModel.Right.ShoulderArm.Jnt.GlenoHumeralJoint","*","AnyMechObject"));

      #define FileToLoadName "GH_2spheres.main_F=10"
      AnyOperationSequence Loadh5AndReplay = {
  AnyOperationMacro LoadData ={
    MacroStr = {"classoperation Main.Study.Output " + strquote("Load data") + "--file=" + strquote(ANYBODY_PATH_OUTPUT +  FileToLoadName + ".anydata.h5")};
  };
AnyOperation &Replay=Main.Study.Replay;

};


  }; // end of study

  #include "Model\RunAppSequence.any"


}; //Main
